!&&&&&&&&&&&&&&&&&&&&&&&&&&&&&&&&&&&&&&&&&&&&&&&&&&&&&&
!_MAT.mac
!DESCRIPTION: Creates a standard material from a single
!  number
!PRECONDITIONS:
!  - UNITS: if psi is not set, units will be reset!
!  mFactor (optional) mass factor ie 1.10 = 10% extra mass
!  PanelThick = PanelThickness if material is Hexcel
!  shouldPrintMatProps (optional) (Currently Only Isotropic)
!     1 -> Material Properties are output to OUT_MaterialProperties.out (Coma delimiated)
!     0 -> No material properties are output (Default)
!  isForRandom (optional)
!     1 -> Tensile and Compressived strengths are set
!          to the minimum tensile or compressive strength
!     0 -> Tensile and compressive strengths are not
!          messed with.
!  ARG1 = Material Number (SEE _MAT_NUMBERS.txt)
!     899 -> Call to Material File Footer
!  ARG2 = Resulting material number
!     [Default] = ARG1
!  ARG3 = Load Failure Criteria
!     0 -> Don't load Failure Criteria
!     1 -> Load FC Failure Criteria
!
!!!!!!!!!!!!!!!!!!!!!!NOTES!!!!!!!!!!!!!!!!!!!!!!!!!!!
!  When creating new material properties, all materail
!     properties should be input as positive
!&&&&&&&&&&&&&&&&&&&&&&&&&&&&&&&&&&&&&&&&&&&&&&&&&&&&&&
/PREP7

! If you want to copy past properties you can use this
! MP,EX,MNum,E11,      !Modulus
! MP,EY,MNum,E22
! MP,EZ,MNum,E33

! MP,prxy,MNum,PR12  !Poison's Ratio
! MP,prxz,MNum,PR13
! MP,pryz,MNum,PR23

! MP,gxy,MNum,G12    !Shear
! MP,gxz,MNum,G13
! MP,gyz,MNum,G23

! MP,DENS,MNum,rho*mFactor
! MP,ALPX,MNum,cteX

!Setup Header and output file if shouldPrintMatProps Set
*if,shouldPrintMatProps,eq,1, and, flagMatHeader,lt,1,then
   flagMatHeader = 1
   *CFOPEN,OUT_MaterialProperties,out
   *vwrite
Material,Material,Modulus (EX),Poisons,CTE (X),Density,Mass,Reference
   *vwrite
ID,Name,psi,Ratio (PRXY),in/in/degC,lbm/in^3,Factor,
*endif

!Run Material Footer, Close Down File
*if,arg1,eq,899, and, shouldPrintMatProps, eq,1, then
   flagMatHeader = 0
   shouldPrintMatProps = 0
   *CFCLOS
   *GO,:_matEnd !RETURN
*endif

!Mass Factors
*if,mFactor,le,0,then   !Account for mass factors
   mFactor = 1
*endif

*if,arg2,gt,0,then      !Set material number
   MNum = ARG2
*else
   MNum = ARG1
*endif

! Units
*if,psi,eq,0,then
   UNITS
*endif

!K_FACTOR for hexcel materials
*if,ARG1,GE,830,and,ARG1,LE,849,then
   K_Factor=0.9093*(PanelThick**(-0.1928))
*elseif,ARG1,GE,871,and,ARG1,LE,892,then
   K_Factor=0.9093*(PanelThick**(-0.1928))
*endif

!---------- STANDARD MATERIAL PROPERTIES -------------

!DEFAULTS
MatName  = 'No Material Assigned'
ref = 'Default Material'
PR12 = 0.3
cteX = 0
rho = 1
E11 = 1 $ E22 = 0 $ E33 = 0
G12 = 0 $ G13 = 0 $ G23 = 0
PR12 = 0 $ PR13 = 0 $ PR23 = 0
S11t = 0 $ S11c = 0 $ S22t = 0 $ S22c = 0 $ S33t = 0 $ S33c = 0
S12 = 0 $ S23 = 0 $ S13 = 0
eps11t= 0 $ eps11c= 0 $ eps22t= 0 $ eps22c= 0 $ eps12 = 0

*IF,ARG1,EQ,802,THEN
   MatName = 'Aluminum 7075-T73'
   ref     = 'MIL-HDBK-5E'
   E11     = 10.3e6*psi
   rho     = 0.1*lbm/in**3
   cteX    = 12.4E-6/degF
   PR12    = 0.33

   ! !----FAILURE CRITERIA (YEILD STRENGTHS)
   ! FC,MNum,S,XTEN,56e3 !Tensile stress, X-direction
   ! FC,MNum,S,YTEN,56e3 !Tensile stress, y-direction
   ! FC,MNum,S,ZTEN,56e3 !Tensile stress, Z-direction
   ! FC,MNum,S,XY  ,38e3 !XY shear stress(Ultimate Strength)
   ! FC,MNum,S,YZ  ,38e3 !YZ shear stress(Ultimate Strength)
   ! FC,MNum,S,XZ  ,38e3 !XZ shear stress(Ultimate Strength)

*ELSEIF,ARG1,EQ,803,THEN
   MatName = 'Ti-6Al-4V'
   ref     = 'MIL-HDBK-5E'
   E11     = 16.0e6*psi
   rho     = 0.16*lbm/in**3
   PR12    = 0.34
   cteX    = 4.8e-6/degF !AT 70degF

*ELSEIF,ARG1,EQ,804,THEN
   MatName = 'STAINLESS_STEEL_A286'
   ref     = 'PRO_E'
   E11     = 2.91E+07*psi
   rho     = 2.87E-01*lbm/in**3
   cteX    = 9.20E-06/degF
   PR12    = 3.10E-01

*elseif,ARG1,EQ,805,THEN
   MatName = 'Aluminum 6061-T651'
   ref     = 'MIL-HDBK-5E'
   E11     = 10.0e6
   rho     = 0.098*lbm/in**3
   PR12    = 0.33
   cteX    = 12.65E-6/degF  !AT 70degF

*elseif,ARG1,EQ,806,THEN
   MatName = 'STAINLESS_STEEL_15-5PH (H1025)'
   ref     = 'MIL-HDBK-5E and PRO_E'
   E11     = 28.5e6*psi
   rho     = 0.283*lbm/in**3
   PR12    = 0.27
   cteX    = 6.3e-6/degF  !AT 70degF

*elseif,ARG1,eq,807,then
   ! G10 Orthotropic material (See 110602_G10_Material_Review)
   MatName = 'G10 Orthotropic'
   ref     = 'See 110602_G10_Material_Review'
   E11     = 2.7e6*psi
   E22     = 2.7e6*psi
   E33     = 2.3e6*psi
   rho     = 0.065*lbm/in**3
   cteX    = 6.6e-6/degF

*elseif,ARG1,eq,808,then
   ! HYSOL EA9394
   MatName  = 'Hysol EA9394'
   ref      = 'Hysol Spec'
   E11      = 0.615e6*psi
   PR12     = 0.45
   rho      = 1.36*gm/mL

*elseif,ARG1,eq,809,then
   ! MS1A
   MatName  = 'MS1A (52% FV) Min Properties'
   ref      = 'MS1A_test_data.xls, YLA, Inc. MS-1A Product Bulletin'
   E11      = 10.37*msi
   rho      = 1.55*gm/cm**3
  ! G12      = 3*msi
   PR12     = 0.3 ! Guess...

*elseif,ARG1,eq,810,then
   ! 6105-T5 Aluminum (80/20 Beams)
   MatName = 'Aluminum 6105-T5 (80/20 Beams)'
   ref = 'http://www.8020.net/PDF/'
   E11 = 10.2*msi
   rho = 0.097*lbm/in**3
   PR12 = 0.3 !Guess
   !Yield Strength = 30 ksi
   !Ultimate Strength = 38 ksi

!------------------------------------------------------
!Hexcel
!HRP (HRP Fiberglass Reinforced Phenolic Honeycomb)
!830 HRP – 3/16 – 4.0 480 400 590 480 57 310 210 13.0 160 130 6.5

*elseif,ARG1,eq,831,then
   !HRP – 3/16 – 5.5 pcf 800 620 900 750 95 490 390 19.0 265 200 11.0
   MatName = 'Hexcel HPR-3/16-5.5pcf'
   rho  = 5.5*pcf
   S33c = 750*psi
   E33  = 95*ksi
   S13  = 390*psi*K_Factor
   G13  = 19.0*ksi
   S23  = 200*psi*K_Factor
   G23  = 11.0*ksi
   cteX = 8.2e-6/degF

   !Assumed Hexcel Properties
   E11 = E33*0.05 $ E22 = E33*0.05 $ G12 = 10 !Small Number
   PR12 = 0.01 $ PR13 = 0.01 $ PR23 = 0.01
   S11t = 10e9*psi !Big Numbers
   S22t = 10e9*psi $ S33t = 10e9*psi $ S12  = 10e9*psi

!  HEXCELL --> Input Converter
! CD   = 3/16
! rho  = 5.5 *pcf
!        800
!        620
!        900
! S33c = 750 *psi
! E33  = 95  *ksi
!        490
! S13  = 390 *psi*K_Factor
! G13  = 19.0*ksi
!        265
! S23  = 200 *psi*K_Factor
! G23  = 11.0*ksi

!832 HRP – 3/16 – 7.0 1150 900 1300 1040 136 650 510 30.0 370 290 14.0
!833 HRP – 3/16 – 8.0 1350 1100 1530 1280 164 750 TBD TBD 460 370 19.0
!834 HRP – 3/16 – 12.0 2300 1800 2520 1960 260 985 815 48.0 675 525 28.0
!835 HRP – 1/4 – 3.5 390 280 455 400 46 250 180 10.0 125 100 5.0
!836 HRP – 1/4 – 4.5 585 480 640 560 70 355 280 15.0 200 155 8.0
!837 HRP – 1/4 – 5.0 680 530 820 660 84 400 305 20.0 230 180 10.0
!838 HRP – 1/4 – 6.5 1025 850 1180 920 120 580 450 25.0 330 260 13.0
!839 HRP – 3/8 – 2.2 165 125 180 145 13 120 90 6.0 60 45 3.0
!840 HRP – 3/8 – 3.2 315 260 390 350 38 205 160 12.0 110 85 5.0
!841 HRP – 3/8 – 4.5 610 450 690 550 65 325 260 14.0 190 150 8.0
!842 HRP – 3/8 – 6.0 900 750 1000 800 100 520 400 25.0 300 210 12.0
!843 HRP – 3/8 – 8.0 1400 1000 1540 1180 150 700 540 27.0 450 350 18.0

!------------------------------------------------------
!Composite Properties

*elseif,ARG1,eq,850,then
   !M55J Historical Minimum Unitape
   MatName  = 'M55J Historical Minimum'
   ref      = 'Ask Sam'
   E11      = 36.9*msi
   E22      = 0.67*msi
   E33      = 0.5*msi
   G12      = 0.45*msi
   G13      = G12
   PR12     = 0.32
   PR13     = 0.32
   PR23     = 0.32
   G23      = E22/2/(1+PR12)
   PR21     = PR12*E22/E11
   PR31     = PR13*E33/E11
   PR32     = PR23*E33/E22
   S11t     = 263*ksi      ! tensile strength in 11 direction
   S11c     = 115*ksi      ! compressive strength in 11 direction
   S22t     = 3.65*ksi     ! tensile strength in 22 direction
   S22c     = 4.915*ksi    ! compressive strength in 22 direction
   S33t = S22t $ S33c = S22c
   S12      = 9.77*ksi     ! 12 shear strength
   S13      = 9.77*ksi     ! 13 shear strength
   S23      = S22t/2       ! 23 shear strength
   rho      = 0.059*lbm/in**3

*elseif,ARG1,eq,854
   ! YSH70 : Historical SAM
   MatName = 'YSH70 Historical Sam'
   ref  = 'Ask Sam'
   E11  = 49000000*psi
   E22  = 740000*psi
   E33  = 500000*psi
   PR12 = 0.31
   PR13 = 0.31      ! Guess
   PR23 = 0.31      ! Guess
   G12  = 700000
   G13  = G12
   G23  = E22/2/(1+PR12)
   rho  = 0.059*lbm/in**3
   S11t = 212e*psi    !A-Basis
   S11c = 45e*psi     !A-Basis
   S22t = 3.65e*psi   !A-Basis
   S22c = 4.915e*psi  !A-Basis
   S33t = 3.7e3*psi   !A-Basis
   S33c = 20.1e3*psi  !A-Basis
   S12  = 6e3         !A-Basis
   S13  = 7e3         !A-Basis
   S23  = 7e3         !A-Basis

*elseif,ARG1,eq,855,then
   ! S2 Glass/epoxy unidirectional facesheet
   MatName  = 'S2 Glass/Epoxy Unidirectional'
   ref      = 'Sam glass properties review'
   E11      = 7.7*msi
   E22      = 2.3*msi
   E33      = 2.3*msi    ! Guess
   G12      = 0.9*msi
   G13      = 0.9*msi    ! Guess
   PR12     = 0.27
   PR13     = 0.27      ! Guess
   PR23     = 0.27      ! Guess
   G23      = E22/2/(1+PR12)
   PR21     = PR12*E22/E11
   PR31     = PR13*E33/E11
   PR32     = PR23*E33/E22
   S11t     = 230*ksi
   S11c     = 100*ksi
   S22t     = 6*ksi
   S22c     = 16*ksi
   S33t = S22t $ S33c = S22c
   S12      = 9*ksi
   S13      = 8*ksi
   S23      = S22t/2
   eps11t   = 0.027
   eps11c   = 0.011
   eps22t   = 0.0025
   eps22c   = 0.011
   eps12    = 0.016
   rho      = 0.071*lbm/in**3

*elseif,ARG1,eq,856
   ! YSH70 : Historical SAM
   MatName = 'YSH70/RS-3C Unidirectional Prepreg 82-12 (Min Values)'
   !Fiber Volume = 58.8%
   !Void Volume  = 1.3%
   ref  = 'TenCate Certificate of Conformace #14489'
   E11  = 50.34*Msi  !Compresive Modulus
   E22  = 740000*psi !From Historical Minimum
   E33  = 500000*psi !From Historical Minimum
   PR12 = 0.31       !From Historical Minimum
   PR13 = 0.31       ! Guess
   PR23 = 0.31       ! Guess
   G12  = 700000     !From Historical Minimum
   G13  = G12
   G23  = E22/2/(1+PR12)
   rho  = 0.059*lbm/in**3
   S11t = 234.63*ksi
   S11c = 68.70*ksi
   S22t = 3.65e*psi   !A-Basis
   S22c = 4.915e*psi  !A-Basis
   S33t = 3.7e3*psi   !A-Basis
   S33c = 20.1e3*psi  !A-Basis
   S12  = 6e3         !A-Basis
   S13  = 8.8*ksi
   S23  = 8.8*ksi

!HEXCEL 5056

!  HEXCELL --> Input Converter
! rho  = 5.5 *pcf
!        ###
!        ###
!        ###
! S33c = 750 *psi
! E33  = 95  *ksi
!        ###
!        ###
! S13  = 390 *psi*K_Factor
! G13  = 19.0*ksi
!        ###
! S23  = 200 *psi*K_Factor
! G23  = 11.0*ksi

! !Assumed Hexcel Properties
! E11 = E33*0.05 $ E22 = E33*0.05 $ G12 = 10 !Small Number
! PR12 = 0.01 $ PR13 = 0.01 $ PR23 = 0.01
! S11t = 10e9*psi !Big Numbers
! S22t = 10e9*psi $ S33t = 10e9*psi $ S12  = 10e9*psi

!871 1/16 – 5056 – .001 9.2 1700p 1300p 1800p 1400p 500p 850x 980p 760p 155.0p 600p 460p 50.0p
!872 1/8 – 5056 – .0007 3.1 320 250 350 260 97 170 250 200 45.0 155 110 20.0

*elseif,ARG1,eq,873,then
   MatName = 'Hexcel 1/8–5056–.001,4.5pcf'
   ref  = 'HexWeb™ Honeycomb Attributes and Properties'
   rho  = 4.5*pcf
   S33c = 500*psi
   E33  = 185*ksi
   S13  = 350*psi*K_Factor
   G13  = 70.0*ksi
   S23  = 205*psi*K_Factor
   G23  = 28.0*ksi
   cteX = 13.2e-6/degF

   !Assumed Hexcel Properties
   E11 = E33*0.05 $ E22 = E33*0.05 $ G12 = 10 !Small Number
   PR12 = 0.01 $ PR13 = 0.01 $ PR23 = 0.01
   S11t = 10e9*psi !Big Numbers
   S22t = 10e9*psi $ S33t = 10e9*psi $ S12  = 10e9*psi

!874 1/8 – 5056 – .0015 6.1 1120 760 1200 825 295 535 690 525 102.0 400 305 38.0
!875 1/8 – 5056 – .002 8.1 1750 1200 1900 1300 435 810 945 740 143.0 560 440 51.0

*elseif,ARG1,eq,876,then
   MatName = 'Hexcel 5/32–5056–.0007,2.6pcf'
   ref  = 'HexWeb™ Honeycomb Attributes and Properties'
   rho  = 2.6*pcf
   S33c = 185*psi
   E33  = 70*ksi
   S13  = 152*psi*K_Factor
   G13  = 37.0*ksi
   S23  = 80*psi*K_Factor
   G23  = 17.0*ksi
   cteX = 13.2e-6/degF

   !Assumed Hexcel Properties
   E11 = E33*0.05 $ E22 = E33*0.05 $ G12 = 10 !Small Number
   PR12 = 0.01 $ PR13 = 0.01 $ PR23 = 0.01
   S11t = 10e9*psi !Big Numbers
   S22t = 10e9*psi $ S33t = 10e9*psi $ S12  = 10e9*psi

*elseif,arg1,eq,877,then
   MatName = 'Hexcel 5/32–5056–.001, 3.8pcf'
   ref  = 'HexWeb™ Honeycomb Attributes and Properties'
   rho  = 3.8*pcf
   S33c = 375*psi
   E33  = 140*ksi
   S13  = 272*psi*K_Factor
   G13  = 57.0*ksi
   S23  = 155*psi*K_Factor
   G23  = 24.0*ksi
   cteX = 13.2e-6/degF

   !Assumed Hexcel Properties
   E11 = E33*0.05 $ E22 = E33*0.05 $ G12 = 10 !Small Number
   PR12 = 0.01 $ PR13 = 0.01 $ PR23 = 0.01
   S11t = 10e9*psi !Big Numbers
   S22t = 10e9*psi $ S33t = 10e9*psi $ S12  = 10e9*psi

!878 5/32 – 5056 – .0015 5.3 820 615 865 650 240 420 550 435 85.0 325 250 33.0
!879 5/32 – 5056 – .002 6.9 1220 920 1340 1000 350 650 760 610 118.0 430 360 43.0
!880 3/16 – 5056 – .0007 2.0 190 110 200 120 45 75 140 105 27.0 85 50 13.0
!881 3/16 – 5056 – .001 3.1 380 250 410 260 97 170 265 200 45.0 150 110 20.0
!882 3/16 – 5056 – .0015 4.4 620 460 670 490 180 310 425 340 68.0 245 198 27.0
!883 3/16 – 5056 – .002 5.7 920 685 1000 735 270 480 565 480 94.0 330 280 36.0

*elseif,arg1,eq,884,then
   MatName = 'Hexcel 1/4–5056–.0007, 1.6pcf'
   ref  = 'HexWeb™ Honeycomb Attributes and Properties'
   rho  = 1.6*pcf
   S33c = 80*psi
   E33  = 30*ksi
   S13  = 78*psi*K_Factor
   G13  = 20.0*ksi
   S23  = 38*psi*K_Factor
   G23  = 10.5*ksi
   cteX = 13.2e-6/degF

   !Assumed Hexcel Properties
   E11 = E33*0.05 $ E22 = E33*0.05 $ G12 = 10 !Small Number
   PR12 = 0.01 $ PR13 = 0.01 $ PR23 = 0.01
   S11t = 10e9*psi !Big Numbers
   S22t = 10e9*psi $ S33t = 10e9*psi $ S12  = 10e9*psi

!885 1/4 – 5056 – .001 2.3 240 145 265 155 58 100 180 130 32.0 100 62 15.0

!  HEXCELL --> Input Converter

*elseif,arg1,eq,886
   MatName = 'Hexcel 1/4–5056–.0015, 3.4pcf'
   rho  = 3.4*pcf
   S33c = 315*psi
   E33  = 115*ksi
   S13  = 230*psi*K_Factor
   G13  = 50.0*ksi
   S23  = 130*psi*K_Factor
   G23  = 22.0*ksi

   !Assumed Hexcel Properties
   E11 = E33*0.05 $ E22 = E33*0.05 $ G12 = 10 !Small Number
   PR12 = 0.01 $ PR13 = 0.01 $ PR23 = 0.01
   S11t = 10e9*psi !Big Numbers
   S22t = 10e9*psi $ S33t = 10e9*psi $ S12  = 10e9*psi

!887 1/4 – 5056 – .002 4.3 580 440 620 465 172 300 400 325 67.0 230 190 27.0
!888 1/4 – 5056 – .0025 5.2 790 600 820 645 230 410 490 425 84.0 300 245 32.0

*elseif,arg1,eq,889,then
   MatName = 'Hexcel 3/8–5056–.0007, 1.0pcf'
   ref  = 'HexWeb™ Honeycomb Attributes and Properties'
   rho  = 1.0*pcf
   S33c = 35*psi
   E33  = 15*ksi
   S13  = 45*psi*K_Factor
   G13  = 15.00*ksi
   S23  = 25*psi*K_Factor
   G23  = 6.80*ksi
   cteX = 13.2e-6/degF

   !Assumed Hexcel Properties
   E11 = E33*0.05 $ E22 = E33*0.05 $ G12 = 10 !Small Number
   PR12 = 0.01 $ PR13 = 0.01 $ PR23 = 0.01
   S11t = 10e9*psi !Big Numbers
   S22t = 10e9*psi $ S33t = 10e9*psi $ S12  = 10e9*psi

!890 3/8 – 5056 – .001 1.6 100 75 110 80 30 50 90 78 20.0 60 38 10.5
!891 3/8 – 5056 – .0015 2.3 215 155 225 155 58 100 170 130 32.0 95 62 15.0
!892 3/8 – 5056 – .002 3.0 320 240 340 260 92 160 245 190 43.0 145 100 19.0
*ENDIF

!======================================================
!Set Material Properties

MP,EX,MNum,E11,      !Modulus
*if,E22,GT,0,then
   MP,EY,MNum,E22
*endif
*if,E33,GT,0,then
   MP,EZ,MNum,E33
*endif

MP,prxy,MNum,PR12  !Poison's Ratio
*if,PR13,GT,0,then
   MP,prxz,MNum,PR13
*endif
*if,PR23,GT,0,then
   MP,pryz,MNum,PR23
*endif

*if,G12,GT,0,then    !Shear Modulus
   MP,gxy,MNum,G12
*endif
*if,G13,GT,0,then
   MP,gxz,MNum,G13
*endif
*if,G23,GT,0,then
   MP,gyz,MNum,G23
*endif

MP,DENS,MNum,rho*mFactor
MP,ALPX,MNum,cteX
*if,cteY,ne,0,then
   MP,ALPY,MNum,cteY
*endif
*if,cteZ,ne,0,then
   MP,ALPY,MNum,cteZ
*endif

! Adjust values if is for random
*if,isForRandom,eq,1,then

   S11  = min(S11t,S11c) ! S11
   S11t = S11
   S11c = S11

   S22  = min(S22t,S22c) ! S22
   S22t = S22
   S22c = S22

   S33  = min(S33t,S33t) ! S33
   S33t = S33
   S33c = S33
*endif

!Failure Criteria
*if,ARG3,EQ,1,then
   *if,S11t,GT,0,then
      FC,MNum,S,XTEN, S11t
   *endif
   *if,S11c,GT,0,then
      FC,MNum,S,XCMP,-S11c
   *endif
   *if,S22t,GT,0,then
      FC,MNum,S,YTEN, S22t
   *endif
   *if,S22c,GT,0,then
      FC,MNum,S,YCMP,-S22c
   *endif
   *if,S33t,GT,0,then
      FC,MNum,S,ZTEN, S33t
   *endif
   *if,S33c,GT,0,then
      FC,MNum,S,ZCMP,-S33c
   *endif
   *if,S12,GT,0,then
      FC,MNum,S,XY,   S12
   *endif
   *if,S23,GT,0,then
      FC,MNum,S,YZ,   S23
   *endif
   *if,S13,GT,0,then
      FC,MNum,S,XZ,   S13
   *endif
   FC,Mnum,S,XYCP,-1 !Set Defaults (Becauase for some reason
   FC,Mnum,S,YZCP,-1 ! they are being set erroniously).
   FC,Mnum,S,XZCP,-1
*endif

*if,shouldPrintMatProps,EQ,1,then
   *vwrite, MNum, MatName, E11/psi, prxy, cteX*degC, rho*in**3/lbm, mFactor, ref
%I	%C	%G	%G	%G	%G	%G	%C
*endif

!======THE--END========THE--END========THE--END========
!ITS THE END OF THE FILE AS WE KNOW IT, AND I FEEL FINE
