/PMACRO
!&&&&&&&&&&&&&&&&&&&&&&&&&&&&&&&&&&&&&&&&&&&&&&&&&&&&&&&&
!_VSEL.mac
!DESCRIPTION: This macro selects, unselects or adds volumes
!   and associated areas, lines and keypoints to the
!   selected set.
!PRECONDITIONS:
!	ARG1='A' --> Volumes and associated areas, lines
!		     and keypoints will be added to the
!		     selected set.
!	ARG1='S' --> Volumes and associated areas, lines
!		     and keypoints will be selected
!	ARG1='U' --> Volumes and associated areas, lines
!	             and keypoints will be unselected
!	ARG2 = Volume to be selected
!	    ELSE user propmpted to select volume
!POSTCONDITIONS:
!   VOLUMES and associated areas, lines and keypoints are
!   selected, unselected or added to the selected set
!&&&&&&&&&&&&&&&&&&&&&&&&&&&&&&&&&&&&&&&&&&&&&&&&&&&&&&&&
FINISH
/PREP7
!------------------SAVE CURRENT SETUP
CM,temp_VOLU,VOLU
CM,temp_AREA,AREA
CM,temp_LINE,LINE
CM,temp_KP,KP
CM,temp_NODE,NODE
CM,temp_ELEM,ELEM

*IF,ARG2,EQ,0,THEN
	*MSG,UI !--------SELECT VOLUME
	SELECT VOLUMES

	vsel,s,p
*ELSE
	vsel,s,,,ARG2
*ENDIF

CM,Sel_Volu,VOLU  !CREATE COMPONENT WITH SELECTED VOLUMES

vsel,s,,,Sel_Volu,,,1 !SELECT AREAS, VOLUMES

*IF,ARG1,NE,'S',AND,ARG1,NE,'s',THEN !CREATE COMPONENTS
	CM,Sel_Area,AREA
	CM,Sel_Line,LINE
	CM,Sel_KP,KP
	CM,Sel_elem,elem
	CM,Sel_node,node
*ENDIF
!------------------------ADD TO SELECTED SET
*IF,ARG1,EQ,'A',OR,ARG1,EQ,'a',THEN
	CMSEL,S,temp_Volu
	CMSEL,A,Sel_Volu

	CMSEL,S,temp_Area
	CMSEL,A,Sel_Area

	CMSEL,S,temp_Line
	CMSEL,A,Sel_Line

	CMSEL,S,temp_KP
	CMSEL,A,Sel_KP

	CMSEL,S,temp_elem
	CMSEL,a,Sel_elem

	CMSEL,s,temp_node
	CMSEL,a,Sel_node,
*ENDIF

!------------------------UNSELECT FROM SELECTED SET
*IF,ARG1,EQ,'U',OR,ARG1,EQ,'u',THEN
	CMSEL,S,temp_Volu
	CMSEL,U,Sel_Volu

	CMSEL,S,temp_Area
	CMSEL,U,Sel_Area

	CMSEL,S,temp_Line
	CMSEL,U,Sel_Line

	CMSEL,S,temp_KP
	CMSEL,U,Sel_KP

	CMSEL,S,temp_elem
	CMSEL,u,Sel_elem

	CMSEL,s,temp_node
	CMSEL,u,Sel_node,
*ENDIF

/REPLOT
!=======================CLEAN UP=========================
!--DELETE TEMPORARY COMPONENTS
CMDELE,temp_VOLU
CMDELE,temp_AREA
CMDELE,temp_LINE
CMDELE,temp_KP
CMDELE,temp_ELEM
CMDELE,temp_NODE

*IF,ARG1,NE,'S',AND,ARG1,NE,'s',THEN
	CMDELE,Sel_VOLU
	CMDELE,Sel_AREA
	CMDELE,Sel_LINE
	CMDELE,Sel_KP
*ENDIF
!======THE--END========THE--END========THE--END=========
!ITS THE END OF THE MACRO AS WE KNOW IT, AND I FEEL FINE
